*Heading
** Job name: ETubeNeoHookeContactExclusion Model name: Model-1
** Generated by: Abaqus/CAE 2023
*Preprint, echo=NO, model=NO, history=NO, contact=NO
**
** PARTS
**
*Part, name=Eulerian
*Node
      1, 0.00193198049, 0.00318198046, 0.0500000007
      2, -0.00124999997,           0., 0.0500000007
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*Element, type=EC3D8R
   1,  138,  111,   17,   16,  361,  334,  240,  239
   2,   19,   18,  115,  116,  242,  241,  338,  339
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*Nset, nset=Set-1, generate
    1,  8697,     1
*Elset, elset=Set-1, generate
    1,  7410,     1
** Section: EulerianSection
*Eulerian Section, elset=Set-1, controls=EC-1
Fluid, fluid-1
*Surface, type=EULERIAN MATERIAL, name=fluid-1
fluid-1
*End Part
**
*Part, name=Lagrangian
*Node
      1, 0.00600000005,           0., 0.0500000007
      2, 0.00549999997,           0., 0.0500000007
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*Element, type=C3D8R
   1,  232,  233,  236,  235,    1,    2,    5,    4
   2,  233,  234,  237,  236,    2,    3,    6,    5
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*Nset, nset=_PickedSet2, internal, generate
    1,  4851,     1
*Elset, elset=_PickedSet2, internal, generate
    1,  3040,     1
** Section: NeoHookeSection
*Solid Section, elset=_PickedSet2, controls=EC-2, material=NeoHooke
,
*End Part
**
**
** ASSEMBLY
**
*Assembly, name=Assembly
**
*Instance, name=Eulerian-1, part=Eulerian
*End Instance
**
*Instance, name=Lagrangian-1, part=Lagrangian
    -0.00125,           0.,           0.
*End Instance
**
*Nset, nset=LagrangeInletNodes, instance=Lagrangian-1
  229,  230,  231,  460,  461,  462
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*Nset, nset=LagrangeOutletNodes, instance=Lagrangian-1
    1,    2,    3,  232,  233,  234
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*Nset, nset=LagrangeXSymmNodes, instance=Lagrangian-1, generate
 4624,  4848,     1
*Nset, nset=LagrangeYSymmNodes, instance=Lagrangian-1, generate
   4,  228,    1
*Nset, nset=Wall, instance=Lagrangian-1, generate
    3,  4851,     3
*Elset, elset=Wall, instance=Lagrangian-1, generate
    2,  3040,     2
*Nset, nset=_PickedSet97, internal, instance=Eulerian-1, generate
    1,  8697,     1
*Elset, elset=_PickedSet97, internal, instance=Eulerian-1, generate
    1,  7410,     1
*Elset, elset=_Euler_CurvedOuter_S3, internal, instance=Eulerian-1
  170,  171,  177,  365,  366,  372
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*Elset, elset=_Euler_CurvedOuter_S6, internal, instance=Eulerian-1
  174,  175,  176,  178,  180,  183
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*Elset, elset=_Euler_CurvedOuter_S4, internal, instance=Eulerian-1
  181,  189,  193,  376,  384,  388
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*Elset, elset=_Euler_CurvedOuter_S5, internal, instance=Eulerian-1
  181,  184,  186,  187,  376,  379
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*Surface, type=ELEMENT, name=Euler_CurvedOuter
_Euler_CurvedOuter_S3, S3
_Euler_CurvedOuter_S6, S6
_Euler_CurvedOuter_S4, S4
_Euler_CurvedOuter_S5, S5
*Elset, elset=_Inlet_S1, internal, instance=Eulerian-1, generate
   1,  149,    1
*Surface, type=ELEMENT, name=Inlet
_Inlet_S1, S1
*Elset, elset=_Inlet_ZeroP_S1, internal, instance=Eulerian-1, generate
 150,  195,    1
*Surface, type=ELEMENT, name=Inlet_ZeroP
_Inlet_ZeroP_S1, S1
*Elset, elset=_OuterWall_S6, internal, instance=Lagrangian-1, generate
    1,  3039,     2
*Surface, type=ELEMENT, name=OuterWall
_OuterWall_S6, S6
*Elset, elset=_Outlet_S2, internal, instance=Eulerian-1, generate
 7216,  7410,     1
*Surface, type=ELEMENT, name=Outlet
_Outlet_S2, S2
*Elset, elset=__PickedSurf11_S6, internal, instance=Eulerian-1
   47,   57,   67,   77,   87,   97
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*Elset, elset=__PickedSurf11_S3, internal, instance=Eulerian-1
  111,  114,  124,  125,  127,  128
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*Elset, elset=__PickedSurf11_S5, internal, instance=Eulerian-1
  120,  121,  122,  141,  315,  316
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*Elset, elset=__PickedSurf11_S4, internal, instance=Eulerian-1
  159,  169,  354,  364,  549,  559
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*Surface, type=ELEMENT, name=_PickedSurf11, internal
__PickedSurf11_S6, S6
__PickedSurf11_S3, S3
__PickedSurf11_S4, S4
__PickedSurf11_S5, S5
*Elset, elset=__PickedSurf12_S4, internal, instance=Eulerian-1
    4,   18,   44,   56,   66,   76
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*Elset, elset=__PickedSurf12_S6, internal, instance=Eulerian-1
    8,   11,   13,   23,   30,   45
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*Elset, elset=__PickedSurf12_S3, internal, instance=Eulerian-1
   15,  176,  210,  371,  405,  566
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*Surface, type=ELEMENT, name=_PickedSurf12, internal
__PickedSurf12_S4, S4
__PickedSurf12_S6, S6
__PickedSurf12_S3, S3
*End Assembly
**
** ELEMENT CONTROLS
**
*Section Controls, name=EC-1, second order accuracy=YES
1., 1., 1.
*Section Controls, name=EC-2, hourglass=ENHANCED, second order accuracy=YES
1., 1., 1.
*Amplitude, name=Amp-1
             0.,              1.,           0.003,              1.,          0.0031,              0.,             0.1,              0.
*Amplitude, name=ZeroPWorkaround
             0.,              0.,              2.,              0.
**
** MATERIALS
**
*Material, name=Fluid
*Density
1000.,
*Viscosity
 0.003,
*Eos, type=USER, PROPERTIES=2
150, 7.15
*Material, name=NeoHooke
*Density
1000.,
*Hyperelastic, neo hooke
57690.,0.
*Material, name=Solid
*Density
1200.,
*Elastic
300000., 0.3
**
** INTERACTION PROPERTIES
**
*Surface Interaction, name=Contact
**
** BOUNDARY CONDITIONS
**
** Name: LagrangeSymmetry1_trueY Type: Symmetry/Antisymmetry/Encastre
*Boundary
LagrangeYSymmNodes, YSYMM
** Name: LagrangeSymmetry2_UserZ Type: Symmetry/Antisymmetry/Encastre
*Boundary
LagrangeXSymmNodes, XSYMM
**
** PREDEFINED FIELDS
**
** Name: MaterialFraction   Type: Material assignment
*Initial Conditions, type=VOLUME FRACTION
_PickedSet97, Eulerian-1.fluid-1, 1.
** ----------------------------------------------------------------
**
** STEP: Step-1
**
*Step, name=Step-1, nlgeom=YES
Pressure on
*Dynamic, Explicit
, 0.02
*Bulk Viscosity
0.06, 1.2
**
** BOUNDARY CONDITIONS
**
** Name: EulerCurved Type: Eulerian boundary
*Eulerian Boundary, inflow=FREE, outflow=ZERO PRESSURE
Euler_CurvedOuter
** Name: EulerInlet_Extern Type: Eulerian boundary
*Eulerian Boundary, inflow=FREE, outflow=ZERO PRESSURE
Inlet_ZeroP
** Name: Euler_Inlet Type: Eulerian boundary
*Eulerian Boundary, inflow=FREE
Inlet
** Name: Euler_Outlet Type: Eulerian boundary
*Eulerian Boundary, outflow=ZERO PRESSURE
Outlet
** Name: LagrangeInlet Type: Symmetry/Antisymmetry/Encastre
*Boundary
LagrangeInletNodes, ENCASTRE
** Name: LagrangeOutlet Type: Symmetry/Antisymmetry/Encastre
*Boundary
LagrangeOutletNodes, ENCASTRE
** Name: Symmetry1 Type: Eulerian boundary
*Eulerian Boundary, inflow=NONE, outflow=NONE
_PickedSurf11
** Name: Symmetry2 Type: Eulerian boundary
*Eulerian Boundary, inflow=NONE, outflow=NONE
_PickedSurf12
**
** LOADS
**
** Name: PZeroCurved   Type: Pressure
*Dsload, amplitude=ZeroPWorkaround
Euler_CurvedOuter, P, 1.
** Name: PZeroIn   Type: Pressure
*Dsload, amplitude=ZeroPWorkaround
Inlet_ZeroP, P, 1.
** Name: PZeroOut   Type: Pressure
*Dsload, amplitude=ZeroPWorkaround
Outlet, P, 1.
** Name: Pressurein   Type: Pressure
*Dsload, amplitude=Amp-1
Inlet, P, 1333.3
**
** INTERACTIONS
**
** Interaction: Interaction
*Contact, op=NEW
*Contact Inclusions, ALL EXTERIOR
*Contact Exclusions
OuterWall , Eulerian-1.fluid-1
*Contact Property Assignment
 ,  , Contact
**
** OUTPUT REQUESTS
**
*Restart, write, number interval=1, time marks=NO
**
** FIELD OUTPUT: F-Output-1
**
*Output, field, number interval=100
*Node Output
A, RF, U, V
*Element Output, directions=YES
DENSITY, EVF, LE, MFL, P, PE, PEEQ, PEEQVAVG, PEVAVG, S, SVAVG
*Contact Output
CSTRESS,
**
** HISTORY OUTPUT: H-Output-1
**
*Output, history, variable=PRESELECT
*End Step
