*Heading
 First Attempt at elastic tube benchmark
** Job name: ETubeVoidTest3 Model name: Model-1
** Generated by: Abaqus/CAE 2023
*Preprint, echo=NO, model=NO, history=NO, contact=NO
**
** PARTS
**
*Part, name=Eulerian
*Node
      1, 0.00238198042, 0.00318198046,           0.
      2, -0.00079999998,           0.,           0.
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*Element, type=EC3D8R
    1,   137,   119,   133,   144,   377,   359,   373,   384
    2,   119,   123,    19,    18,   359,   363,   259,   258
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*Nset, nset=Set-1, generate
     1,  18480,      1
*Elset, elset=Set-1, generate
     1,  16112,      1
** Section: EulerianSection
*Eulerian Section, elset=Set-1, controls=EC-1
Fluid, fluid-1
*Surface, type=EULERIAN MATERIAL, name=fluid-1
fluid-1
*End Part
**
*Part, name=Lagrangian
*Node
      1, 0.00600000005,           0., 0.0500000007
      2, 0.00549999997,           0., 0.0500000007
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*Element, type=C3D8R
   1,  232,  233,  236,  235,    1,    2,    5,    4
   2,  233,  234,  237,  236,    2,    3,    6,    5
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*Nset, nset=_PickedSet2, internal, generate
    1,  4851,     1
*Elset, elset=_PickedSet2, internal, generate
    1,  3040,     1
** Section: LagrangianSection
*Solid Section, elset=_PickedSet2, controls=EC-2, material=Solid
,
*End Part
**
**
** ASSEMBLY
**
*Assembly, name=Assembly
**
*Instance, name=Eulerian-1, part=Eulerian
          0.,           0.,        -0.05
*End Instance
**
*Instance, name=Lagrangian-1, part=Lagrangian
     -0.0008,           0.,        -0.05
*End Instance
**
*Nset, nset=LagrangeInletNodes, instance=Lagrangian-1
  229,  230,  231,  460,  461,  462
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*Nset, nset=LagrangeOutletNodes, instance=Lagrangian-1
    1,    2,    3,  232,  233,  234
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*Nset, nset=LagrangeXSymmNodes, instance=Lagrangian-1, generate
 4624,  4848,     1
*Nset, nset=LagrangeYSymmNodes, instance=Lagrangian-1, generate
   4,  228,    1
*Nset, nset=_PickedSet51, internal, instance=Eulerian-1, generate
     1,  18480,      1
*Elset, elset=_PickedSet51, internal, instance=Eulerian-1, generate
     1,  16112,      1
*Nset, nset=_PickedSet89, internal, instance=Eulerian-1, generate
     1,  18480,      1
*Elset, elset=_PickedSet89, internal, instance=Eulerian-1, generate
     1,  16112,      1
*Elset, elset=_In_Outside_S1, internal, instance=Eulerian-1
  46,  47,  48,  49,  50,  51
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*Surface, type=ELEMENT, name=In_Outside
_In_Outside_S1, S1
*Elset, elset=_OutFace_S2, internal, instance=Eulerian-1, generate
 15901,  16112,      1
*Surface, type=ELEMENT, name=OutFace
_OutFace_S2, S2
*Elset, elset=_Outlet_S5, internal, instance=Eulerian-1
   189,   191,   194,   202,   401,   403
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*Elset, elset=_Outlet_S4, internal, instance=Eulerian-1
   192,   199,   404,   411,   616,   623
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*Elset, elset=_Outlet_S6, internal, instance=Eulerian-1
   193,   198,   202,   405,   410,   414
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*Elset, elset=_Outlet_S3, internal, instance=Eulerian-1
   188,   190,   203,   205,   207,   209
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*Elset, elset=_Outlet_S2, internal, instance=Eulerian-1, generate
 15901,  16112,      1
*Surface, type=ELEMENT, name=Outlet
_Outlet_S5, S5
_Outlet_S4, S4
_Outlet_S6, S6
_Outlet_S2, S2
_Outlet_S3, S3
*Elset, elset=_P_in__Inside_S1, internal, instance=Eulerian-1
   1,   2,   3,   4,   5,   6
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*Surface, type=ELEMENT, name=P_in__Inside
_P_in__Inside_S1, S1
*Elset, elset=_Surf-8_S5, internal, instance=Eulerian-1, generate
   191,  16091,    212
*Elset, elset=_Surf-8_S4, internal, instance=Eulerian-1
   192,   199,   404,   411,   616,   623
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*Elset, elset=_Surf-8_S6, internal, instance=Eulerian-1
   193,   198,   202,   405,   410,   414
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*Elset, elset=_Surf-8_S3, internal, instance=Eulerian-1
   209,   210,   421,   422,   633,   634
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*Surface, type=ELEMENT, name=Surf-8
_Surf-8_S5, S5
_Surf-8_S4, S4
_Surf-8_S6, S6
_Surf-8_S3, S3
*Elset, elset=__PickedSurf11_S4, internal, instance=Eulerian-1
     4,    32,    81,    93,   129,   141
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*Elset, elset=__PickedSurf11_S6, internal, instance=Eulerian-1
     5,     7,     8,    18,    19,    20
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*Elset, elset=__PickedSurf11_S3, internal, instance=Eulerian-1, generate
   193,  16093,    212
*Surface, type=ELEMENT, name=_PickedSurf11, internal
__PickedSurf11_S4, S4
__PickedSurf11_S6, S6
__PickedSurf11_S3, S3
*Elset, elset=__PickedSurf12_S4, internal, instance=Eulerian-1
    57,    69,   105,   117,   166,   269
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*Elset, elset=__PickedSurf12_S6, internal, instance=Eulerian-1
    70,    82,   118,   130,   188,   282
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*Elset, elset=__PickedSurf12_S5, internal, instance=Eulerian-1
   153,   156,   163,   170,   174,   365
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*Elset, elset=__PickedSurf12_S3, internal, instance=Eulerian-1
   160,   161,   167,   173,   372,   373
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*Surface, type=ELEMENT, name=_PickedSurf12, internal
__PickedSurf12_S4, S4
__PickedSurf12_S6, S6
__PickedSurf12_S5, S5
__PickedSurf12_S3, S3
*End Assembly
**
** ELEMENT CONTROLS
**
*Section Controls, name=EC-1, second order accuracy=YES
1., 1., 1.
*Section Controls, name=EC-2, hourglass=ENHANCED, second order accuracy=YES
1., 1., 1.
*Amplitude, name=Amp-1
             0.,              1.,           0.003,              1.,          0.0031,              0.,             0.1,              0.
*Amplitude, name=ZeroPressureWorkaround
             0.,              0.,              3.,              0.
**
** MATERIALS
**
*Material, name=Fluid
*Density
1000.,
*Viscosity
 0.003,
*Eos, type=USER, PROPERTIES=2
150, 7.15
*Material, name=Solid
*Density
1200.,
*Hyperelastic, neo hooke
57690.,0.
**
** INTERACTION PROPERTIES
**
*Surface Interaction, name=GeneralContact
*Surface Interaction, name=LinearContact
*Surface Behavior, pressure-overclosure=LINEAR
0.08,
**
** BOUNDARY CONDITIONS
**
** Name: LagrangeSymmetry1_trueY Type: Symmetry/Antisymmetry/Encastre
*Boundary
LagrangeYSymmNodes, YSYMM
** Name: LagrangeSymmetry2_UserZ Type: Symmetry/Antisymmetry/Encastre
*Boundary
LagrangeXSymmNodes, XSYMM
**
** PREDEFINED FIELDS
**
** Name: MaterialFraction   Type: Material assignment
*Initial Conditions, type=VOLUME FRACTION
Eulerian-1.1, Eulerian-1.fluid-1, 1.
Eulerian-1.2, Eulerian-1.fluid-1, 1.
Eulerian-1.3, Eulerian-1.fluid-1, 1.
Eulerian-1.4, Eulerian-1.fluid-1, 1.
Eulerian-1.5, Eulerian-1.fluid-1, 1.
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Eulerian-1.16087, Eulerian-1.fluid-1, 1.
** ----------------------------------------------------------------
**
** STEP: Step-1
**
*Step, name=Step-1, nlgeom=YES
Pressure on
*Dynamic, Explicit
, 0.02
*Bulk Viscosity
0.06, 1.2
**
** BOUNDARY CONDITIONS
**
** Name: EulerOutFace Type: Eulerian boundary
*Eulerian Boundary, outflow=ZERO PRESSURE
OutFace
** Name: Euler_Inlet Type: Eulerian boundary
*Eulerian Boundary, inflow=FREE
P_in__Inside
** Name: LagrangeInlet Type: Symmetry/Antisymmetry/Encastre
*Boundary
LagrangeInletNodes, ENCASTRE
** Name: LagrangeOutlet Type: Symmetry/Antisymmetry/Encastre
*Boundary
LagrangeOutletNodes, ENCASTRE
** Name: Symmetry1 Type: Eulerian boundary
*Eulerian Boundary, inflow=NONE, outflow=NONE
_PickedSurf11
** Name: Symmetry2 Type: Eulerian boundary
*Eulerian Boundary, inflow=NONE, outflow=NONE
_PickedSurf12
**
** LOADS
**
** Name: Pout   Type: Pressure
*Dsload, amplitude=ZeroPressureWorkaround
OutFace, P, 1.
** Name: Pressurein   Type: Pressure
*Dsload, amplitude=Amp-1
P_in__Inside, P, 1333.33
**
** INTERACTIONS
**
** Interaction: Interaction
*Contact, op=NEW
*Contact Inclusions, ALL EXTERIOR
*Contact Property Assignment
 ,  , GeneralContact
**
** OUTPUT REQUESTS
**
*Restart, write, number interval=1, time marks=NO
**
** FIELD OUTPUT: F-Output-1
**
*Output, field, number interval=100
*Node Output
A, RF, U, V
*Element Output, directions=YES
DENSITY, EVF, LE, MFL, P, PE, PEEQ, PEEQVAVG, PEVAVG, S, SVAVG
*Contact Output
CSTRESS,
**
** HISTORY OUTPUT: H-Output-1
**
*Output, history, variable=PRESELECT
*End Step
