*Heading
** Job name: BCFlap_6__FineMesh__c0_150 Model name: Model-1
** Generated by: Abaqus/CAE 2023
*Preprint, echo=NO, model=NO, history=NO, contact=NO
**
** PARTS
**
*Part, name=Eulerian
*Node
      1,   1.44000006,           2.,  0.100000001
      2,   1.44000006,           0.,  0.100000001
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*Element, type=EC3D8R
   1,  514, 1158,   34,   33, 2758, 3402, 2278, 2277
   2,  319,  458,   36,   35, 2563, 2702, 2280, 2279
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*Nset, nset=Eulerian, generate
    1,  4488,     1
*Elset, elset=Eulerian, generate
    1,  2181,     1
*Nset, nset=_PickedSet9, internal, generate
    1,  4488,     1
*Elset, elset=_PickedSet9, internal, generate
    1,  2181,     1
** Section: Eulerian
*Eulerian Section, elset=_PickedSet9, controls=EC-1
Water, water-1
*Surface, type=EULERIAN MATERIAL, name=water-1
water-1
*End Part
**
*Part, name=Flap
*Node
      1, 0.0500000007,           1.,  0.100000001
      2, 0.0500000007,  0.975000024,  0.100000001
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*Element, type=C3D8R
  1,  206,  207,  248,  247,    1,    2,   43,   42
  2,  207,  208,  249,  248,    2,    3,   44,   43
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*Nset, nset=Flap, generate
    1,  1025,     1
*Elset, elset=Flap, generate
   1,  640,    1
*Nset, nset=_PickedSet4, internal, generate
    1,  1025,     1
*Elset, elset=_PickedSet4, internal, generate
   1,  640,    1
*Nset, nset=Flap_Symm
 207, 208, 209, 210, 211, 212
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*Nset, nset=Flap_NoSlip
    1,    2,    3,    4,    5,    6
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*Nset, nset=Disp_node
 493,
** Section: Solid
*Solid Section, elset=_PickedSet4, controls=EC-2, material=Solid
,
*End Part
**
**
** ASSEMBLY
**
*Assembly, name=Assembly
**
*Instance, name=Eulerian-1, part=Eulerian
*End Instance
**
*Instance, name=Flap-1, part=Flap
*End Instance
**
*Nset, nset=BotWall, instance=Eulerian-1
    2,    3,    6,    7,    9,   12
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*Elset, elset=BotWall, instance=Eulerian-1
    4,   53,   68,  117,  176,  177
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*Nset, nset=TopWall, instance=Eulerian-1
    4,    5,   65,   66,   67,   68
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*Elset, elset=TopWall, instance=Eulerian-1
   17,   18,   19,   51,   52,   67
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*Nset, nset=V_in, instance=Eulerian-1
    5,    6,   94,   95,   96,   97
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*Nset, nset=_PickedSet7, internal, instance=Eulerian-1, generate
    1,  4488,     1
*Elset, elset=_PickedSet7, internal, instance=Eulerian-1, generate
    1,  2181,     1
*Nset, nset=_PickedSet18, internal, instance=Flap-1, generate
   41,  1025,    41
*Elset, elset=_PickedSet18, internal, instance=Flap-1, generate
  40,  640,   40
*Elset, elset=_Outlet_S6, internal, instance=Eulerian-1
 66, 76, 84
*Elset, elset=_Outlet_S3, internal, instance=Eulerian-1
   69,   70,   75,   77,   78,  975,  977,  980,  992,  993,  994, 1041
*Elset, elset=_Outlet_S5, internal, instance=Eulerian-1
  71, 396, 976
*Elset, elset=_Outlet_S4, internal, instance=Eulerian-1
 393, 395
*Surface, type=ELEMENT, name=Outlet
_Outlet_S6, S6
_Outlet_S3, S3
_Outlet_S4, S4
_Outlet_S5, S5
*Elset, elset=__PickedSurf11_S6, internal, instance=Eulerian-1
 66, 76, 84
*Elset, elset=__PickedSurf11_S3, internal, instance=Eulerian-1
   69,   70,   75,   77,   78,  975,  977,  980,  992,  993,  994, 1041
*Elset, elset=__PickedSurf11_S5, internal, instance=Eulerian-1
  71, 396, 976
*Elset, elset=__PickedSurf11_S4, internal, instance=Eulerian-1
 393, 395
*Surface, type=ELEMENT, name=_PickedSurf11, internal
__PickedSurf11_S6, S6
__PickedSurf11_S3, S3
__PickedSurf11_S4, S4
__PickedSurf11_S5, S5
*Elset, elset=__PickedSurf12_S6, internal, instance=Eulerian-1
 116, 159, 160, 166, 174
*Elset, elset=__PickedSurf12_S4, internal, instance=Eulerian-1
  162,  169,  170,  401,  402,  404,  985,  986,  987,  998,  999, 1051
*Elset, elset=__PickedSurf12_S3, internal, instance=Eulerian-1
 176,
*Elset, elset=__PickedSurf12_S5, internal, instance=Eulerian-1
  403, 1064
*Surface, type=ELEMENT, name=_PickedSurf12, internal
__PickedSurf12_S6, S6
__PickedSurf12_S4, S4
__PickedSurf12_S3, S3
__PickedSurf12_S5, S5
*Elset, elset=__PickedSurf13_S1, internal, instance=Eulerian-1, generate
    1,  2181,     1
*Elset, elset=__PickedSurf13_S2, internal, instance=Eulerian-1, generate
    1,  2181,     1
*Surface, type=ELEMENT, name=_PickedSurf13, internal
__PickedSurf13_S1, S1
__PickedSurf13_S2, S2
*End Assembly
**
** ELEMENT CONTROLS
**
*Section Controls, name=EC-1, second order accuracy=YES
1., 1., 1.
*Section Controls, name=EC-2, second order accuracy=YES
1., 1., 1.
*Amplitude, name=Ramp_In, definition=SMOOTH STEP
             0.,              0.,             0.1,              1.
**
** MATERIALS
**
*Material, name=Solid
*Density
3000.,
*Elastic
 4e+06, 0.3
*Material, name=Water
*Density
1.,
*Eos, type = USER, PROPERTIES=2
1500, 7.15
*Viscosity
1.,
**
** INTERACTION PROPERTIES
**
*Surface Interaction, name=InteractionProp
*Friction
0.,
**
** PREDEFINED FIELDS
**
** Name: MaterialAss   Type: Material assignment
*Initial Conditions, type=VOLUME FRACTION
_PickedSet7, Eulerian-1.water-1, 1.
** ----------------------------------------------------------------
**
** STEP: Step-1
**
*Step, name=Step-1, nlgeom=YES
*Dynamic, Explicit
, 5.
*Bulk Viscosity
0.06, 1.2
**
** BOUNDARY CONDITIONS
**
** Name: BottomWall Type: Velocity/Angular velocity
*Boundary, type=VELOCITY
BotWall, 2, 2
** Name: Euler_Symm Type: Eulerian boundary
*Eulerian Boundary, inflow=NONE, outflow=NONE
_PickedSurf13
** Name: Euler_in Type: Eulerian boundary
*Eulerian Boundary, inflow=FREE
_PickedSurf12
** Name: Euler_out Type: Eulerian boundary
*Eulerian Boundary, outflow=FREE
_PickedSurf11
** Name: Flap_Base Type: Symmetry/Antisymmetry/Encastre
*Boundary
_PickedSet18, ENCASTRE
** Name: Flap_MoveConst Type: Velocity/Angular velocity
*Boundary, type=VELOCITY
Flap-1.Flap_NoSlip, 3, 3
Flap-1.Flap_NoSlip, 4, 4
Flap-1.Flap_NoSlip, 5, 5
** Name: Flap_Symm Type: Symmetry/Antisymmetry/Encastre
*Boundary
Flap-1.Flap_Symm, ZSYMM
** Name: Top_Wall Type: Velocity/Angular velocity
*Boundary, type=VELOCITY
TopWall, 2, 2
** Name: V_in Type: Velocity/Angular velocity
*Boundary, amplitude=Ramp_In, type=VELOCITY
V_in, 1, 1, 10.
**
** LOADS
**
** Name: Out_P   Type: Pressure
*Dsload
Outlet, P, 1e-06
**
** INTERACTIONS
**
** Interaction: Interaction
*Contact, op=NEW
*Contact Inclusions, ALL EXTERIOR
*Contact Property Assignment
 ,  , InteractionProp
**
** OUTPUT REQUESTS
**
*Restart, write, number interval=1, time marks=NO
**
** FIELD OUTPUT: F-Output-1
**
*Output, field, number interval=50
*Node Output
A, RF, U, V
*Element Output, directions=YES
DENSITY, EVF, LE, PE, PEEQ, PEEQVAVG, PEVAVG, S, SVAVG
*Contact Output
CSTRESS,
**
** HISTORY OUTPUT: x_Disp
**
*Output, history
*Node Output, nset=Flap-1.Disp_node
U1,
**
** HISTORY OUTPUT: H-Output-1
**
*Output, history, variable=PRESELECT
*End Step
