*Heading
** Job name: Radius_0_025__Mesh80 Model name: Model-1
** Generated by: Abaqus/CAE 2023
*Preprint, echo=NO, model=NO, history=NO, contact=NO
**
** PARTS
**
*Part, name=Tube
*Node
      1,           5.,  0.100000001, 0.0250000004
      2,           5., 0.0996875018, 0.0250000004
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*Element, type=EC3D8R
   1,  163,  164,  245,  244,    1,    2,   83,   82
   2,  164,  165,  246,  245,    2,    3,   84,   83
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*Nset, nset=Set-1, generate
    1,  9882,     1
*Elset, elset=Set-1, generate
    1,  4800,     1
** Section: Eulerian Section
*Eulerian Section, elset=Set-1, controls=EC-1
Water, water-1
*Surface, type=EULERIAN MATERIAL, name=water-1
water-1
*End Part
**
**
** ASSEMBLY
**
*Assembly, name=Assembly
**
*Instance, name=Tube-1, part=Tube
*End Instance
**
*Nset, nset=InFace, instance=Tube-1, generate
 9721,  9882,     1
*Elset, elset=InFace, instance=Tube-1, generate
 4721,  4800,     1
*Nset, nset="Inlet Nodes", instance=Tube-1
 9722, 9723, 9724, 9725, 9726, 9727
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*Nset, nset=Symm, instance=Tube-1, generate
   81,  9720,    81
*Nset, nset=Wall, instance=Tube-1, generate
    1,  9802,    81
*Elset, elset=Wall, instance=Tube-1, generate
    1,  4721,    80
*Nset, nset=YSymm, instance=Tube-1, generate
   81,  9882,    81
*Elset, elset=YSymm, instance=Tube-1, generate
   80,  4800,    80
*Nset, nset=Z-Walls, instance=Tube-1, generate
    1,  9882,     1
*Elset, elset=Z-Walls, instance=Tube-1, generate
    1,  4800,     1
*Nset, nset=ZSymm, instance=Tube-1
    2,    3,    4,    5,    6,    7
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*Nset, nset=_PickedSet11, internal, instance=Tube-1, generate
    1,  9882,     1
*Elset, elset=_PickedSet11, internal, instance=Tube-1, generate
    1,  4800,     1
*Elset, elset=__PickedSurf15_S1, internal, instance=Tube-1, generate
 4721,  4800,     1
*Surface, type=ELEMENT, name=_PickedSurf15, internal
__PickedSurf15_S1, S1
*Elset, elset=__PickedSurf16_S2, internal, instance=Tube-1, generate
  1,  80,   1
*Surface, type=ELEMENT, name=_PickedSurf16, internal
__PickedSurf16_S2, S2
*Elset, elset=__PickedSurf17_S2, internal, instance=Tube-1, generate
  1,  80,   1
*Surface, type=ELEMENT, name=_PickedSurf17, internal
__PickedSurf17_S2, S2
*End Assembly
**
** ELEMENT CONTROLS
**
*Section Controls, name=EC-1, second order accuracy=YES
1., 1., 1.
*Amplitude, name=SmoothIn, definition=SMOOTH STEP
             0.,              0.,             50.,              1.
**
** MATERIALS
**
*Material, name=water
*Density
1000.,
*Eos, type=USER, PROPERTIES=2
15,7.15
*Viscosity
 0.001,
**
** BOUNDARY CONDITIONS
**
** Name: Symm Type: Symmetry/Antisymmetry/Encastre
*Boundary
Symm, YSYMM
** Name: ZSymm Type: Symmetry/Antisymmetry/Encastre
*Boundary
ZSymm, ZSYMM
**
** PREDEFINED FIELDS
**
** Name: Predefined Field-1   Type: Material assignment
*Initial Conditions, type=VOLUME FRACTION
_PickedSet11, Tube-1.water-1, 1.
** ----------------------------------------------------------------
**
** STEP: Step-1
**
*Step, name=Step-1, nlgeom=YES
*Dynamic, Explicit
, 1000.
*Bulk Viscosity
0.06, 1.2
**
** BOUNDARY CONDITIONS
**
** Name: EulerIn Type: Eulerian boundary
*Eulerian Boundary, inflow=FREE
_PickedSurf15
** Name: EulerOut Type: Eulerian boundary
*Eulerian Boundary, outflow=FREE
_PickedSurf16
** Name: InletVelocity Type: Velocity/Angular velocity
*Boundary, amplitude=SmoothIn, type=VELOCITY
"Inlet Nodes", 1, 1, 0.01
"Inlet Nodes", 2, 2
"Inlet Nodes", 3, 3
** Name: NoSlip Type: Velocity/Angular velocity
*Boundary, type=VELOCITY
Wall, 1, 1
Wall, 2, 2
Wall, 3, 3
Wall, 4, 4
Wall, 5, 5
Wall, 6, 6
**
** LOADS
**
** Name: OutPressure   Type: Pressure
*Dsload
_PickedSurf17, P, 1e-07
**
** OUTPUT REQUESTS
**
*Restart, write, number interval=1, time marks=NO
**
** FIELD OUTPUT: F-Output-1
**
*Output, field, number interval=50
*Node Output
A, RF, U, V
*Element Output, directions=YES
DENSITY, EVF, LE, PE, PEEQ, PEEQVAVG, PEVAVG, S, SVAVG
*Contact Output
CSTRESS,
**
** HISTORY OUTPUT: H-Output-1
**
*Output, history, variable=PRESELECT
*End Step
